// COMSOL Multiphysics 6.2.0.290 model "PF-breakdown.mph"
// Outline of the model tree

Parameters
  e_fAlO = 10
  n_f = 1  // number of fillers
  V_f = 4/3*pi*r_f^3*n_f  // total volume of fillers
  V_c = V_f/VF  // volume of composites
  l_c = V_c^(1/3)  // length of the unit cell
  rho_r = 1170[g/cm^3]  // density of resin
  VF_convert = (WF * rho_r) / ((WF * rho_r) + ((1 - WF) * rho_f))
  VFmax = pi*n_f*r_f^3/(6*(r_f+thk)^3)
  VF = VF_convert
  WF_convert = (VF *rho_f) / ((VF * rho_f) + ((1 - VF) * rho_r))
  rho_AlO = 4000[g/cm^3]
  rho_AlN = 3260[g/cm^3]
  rho_BN = 2100[g/cm^3]
  rho_TiO2 = 4000[g/cm^3]
  rho_MgO = 4000[g/cm^3]
  rho_BT = 6020[g/cm^3]
  rho_SiO2 = 2600[g/cm^3]
  thkmax = (pi*r_f^3*n_f/6/VF)^(1/3)-r_f
  e_fMgO = 9.6  // relative permittivity of filler (MgO)
  e_fAlN = 8.9  // relative permittivity of filler (AlN)
  e_fTiO = 99
  PESU = 4.386
  EP = 3.52
  e_fBT = 1700
  e_fSiO2 = 7
  r_f = 11[nm]  // radius of filler
  thk = 27.6[nm]  // thickness of interface
  np = 10
  e_r = EP  // relative permittivity of resin
  e_f = e_fMgO
  WF = 0.02  // weight fraction
  rho_f = rho_MgO  // density of filler
  e_i = 1
  V_end = 188[kV/mm]*l_c
  t0 = 1e-7[s]
  dt = t0/10
  tt = 10*t0
  seed = 40000

Functions
  int1: Interpolation | table = {{0, 0}, {2*tt, V_end}}; fununit = V; argunit = s

Variables
  var1 "PF para"
    fn = 10-15*d+6*d^2
    fm = 15*d^2*(d-1)^2*epsilon0*(es.normE)^2
    epsilon_ij = d^3*fn*epsilonB+(1-d^3*fn)*epsilonM
    LHF = L0*(es.We>fcri)
    epsilonF_ij = d^3*fn*epsilonB+(1-d^3*fn)*epsilonF
    alpha = 10^6[J/m^3]
    gamma = 10^-12[J/m]
    epsilon0 = epsilon0_const
    epsilonB = 1e4
    epsilonM = e_r
    epsilonF = e_f
    fcri = epsilon0*epsilonM*Eb*Eb*0.5
    EbF = 1000[kV/mm]
    fcriF = epsilon0*epsilonF*EbF*EbF*0.5
    L0 = 1[m^2/s/N]
    Eb = val
    dfs = alpha*d(fs,d)
    fs = d^2*(1-d)^2  // shen zhong hui
    fd = 1-4*d^3+3*d^4  // wei hong
    dfe = -d(es.We, d)
  var2 "interface" on selection sel2
    e_int = (norDw<0.5)*((epsilonF-e_i)*ffp+e_i)+(norDw>=0.5)*((epsilonM-e_i)*ggp+e_i)
    ffp = (1-2*norDw)^np
    ggp = (2*norDw-1)^np
    norDw = (wd.Dw-minop1(wd.Dw))/(maxop1(wd.Dw)-minop1(wd.Dw))
    epsilonI_ij = d^3*fn*epsilonB+(1-d^3*fn)*e_int
  var3 "Weibull"
    rn = 0.5+random(meshelement,seed)  // random number from 0-1
    aa = 100
    bb = 15.57
    val = -aa*((-log(1/(rn))^(1/bb)))[kV/mm]

Selections
  sel1: Explicit "filler" on domains 7
  sel2: Explicit "interface" on domains 2, 3, 5, 6

Couplings
  maxop1: Maximum on selection sel2
  minop1: Minimum on selection sel2

Common definitions
  state1: StateVariables "状态变量 1" on domains 1-3, 5-7
    state = Estate
    initialValue = 0
    updateExpression = if(es.We>fcri,1,Estate)
    update = afterStep
  state2: StateVariables "状态变量 2" (disabled) on domains 7
    state = EstateF
    initialValue = 0
    updateExpression = if(es.We>fcriF,1,EstateF)
    update = afterStep

Geometry
  geom1 "几何 1" (2D, length unit µm)
    sq1: Square "正方形 1" | base = center; size = l_c
    c100: Circle "圆 100" | layername = Layer 1; layer = thk; r = r_f+thk
    pol1: Polygon "多边形 1" | source = table; table = {{-l_c/50, l_c/2}, {l_c/50, l_c/2}, {0, l_c/2-l_c/50}}
    pol2: Polygon (disabled) | type = open; source = table; table = {{5.90892080589e-18, 0.0386}, {0, 0.0470126916866}}
    pol3: Polygon (disabled)
      type = open
      source = table
      table = {{0.0386, -4.72713664471e-18}, {0.0489715538402, -1.38777878078e-17}}
    pol4: Polygon (disabled)
      type = open
      source = table
      table = {{-3.54535248353e-18, -0.0386}, {-1.38777878078e-17, -0.0489715538402}}
    pol5: Polygon (disabled) | type = open; source = table; table = {{-0.0386, 2.36356832235e-18}, {-0.0489715538402, 0}}
    del1: Delete "Delete Entities 1" (disabled) | input = c100(1) boundaries 1-4
    rot1: Rotate | input = c100
    fin: Finalize "形成联合体"
    mce1: MeshControlEdges (disabled) | input = fin 4, 9, 13, 17

Physics
  es: Electrostatics "静电" on all domains
    dependent variable V
    ShapeProperty.order_electricpotential = 1
    ccn1: ChargeConservation "resin" (default) | epsilonr_mat = userdef; epsilonr = epsilon_ij
    zc1: ZeroCharge "零电荷 1" (default)
    init1: init "初始值 1" (default)
    pot1: ElectricPotential "电势 1" on boundaries 3, 5, 9, 10 | V0 = int1(t)
    pot2: ElectricPotential "电势 2" on boundaries 2 | V0 = 0
    ccn2: ChargeConservation "filler" on domains 2, 3, 5-7 | epsilonr_mat = userdef; epsilonr = epsilon_ij
    ccn4: ChargeConservation "interface" on selection sel2 | epsilonr_mat = userdef; epsilonr = epsilon_ij
    ccn3: ChargeConservation "电荷守恒 3" on domains 4 | epsilonr_mat = userdef; epsilonr = epsilonB
  c: CoefficientFormPDE "系数形式偏微分方程" on all domains
    dependent variable d
    ShapeProperty.order = 2
    Units.CustomSourceTermUnit = 1/s
    cfeq1: CoefficientFormPDE "系数形式偏微分方程 1" (default)
      c = {gamma*L0*Estate, 0, 0, gamma*L0*Estate}
      f = -(dfs+dfe)*L0*Estate
      da = 1
    zflx1: ZeroFluxBoundary "零通量 1" (default)
    init1: init "初始值 1" (default)
    init2: init "初始值 2" on domains 4 | d = 1
    cfeq2: CoefficientFormPDE "系数形式偏微分方程 2" (disabled) on domains 7
      c = {gamma*L0*EstateF, 0, 0, gamma*L0*EstateF}
      f = -(dfs+dfe)*L0*EstateF
      da = 1
    dir1: DirichletBoundary "狄利克雷边界条件 1" (disabled) on boundaries 5 | r = 1
    cfeq3: CoefficientFormPDE on domains 4 | c = {0, 0, 0, 0}; f = 0; da = 1
  wd: WallDistance on selection sel2
    dependent variable G
    PhysicalModelProperty.sigmaw = 0.1
    deq1: DistanceEquation (default)
    init1: init "Initial Values 1" (default)
    wall1: Wall on boundaries 15, 16, 18, 19

Mesh
  mesh1 "网格 1"
    size: MeshSizeDefault "大小" | hmax = 0.00656; hmin = 2.94E-5; hcurve = 0.3; hgrad = 1.3
    map1: Map "Mapped 1" (disabled) on domains 2, 3, 5, 6
      dis1: Distribution on no boundaries | numelem = 50
      dis2: Distribution on boundaries 15, 16, 18, 19 | numelem = 50
    fq3: FreeQuad (disabled) on remaining entities
      size1: Size on entire geometry | hmax = 0.0005; hauto = 1; custom = on
    ftri1: FreeTri "Free Triangular 1" on remaining entities
      size1: Size on entire geometry | hmax = 0.00099; custom = on
    fq1: FreeQuad "自由四边形网格 1" (disabled) on remaining entities
      size1: Size "大小 1" on domains 1, 4 | hmax = 0.00656; hcurve = 0.3; hgrad = 1.3
    fq2: FreeQuad "自由四边形网格 2" (disabled) on remaining entities
      size1: Size "大小 1" on entire geometry

Studies
  std2 "wall distance"
    stat: Stationary | solve for = {wd}
  std1 "with interface"
    time: Transient "with interface"
      tlist = range(0,dt,10*tt)
      usertol = on
      rtol = 0.0001
      solve for = {es, c}
      usesol = on
      notstudy = std2
  std3 "without interface"
    time: Transient "Time Dependent"
      tlist = range(0,dt,10*tt)
      usertol = on
      rtol = 0.0001
      solve for = {es, c}
      usesol = on
      notsolmethod = sol
      notstudy = std2

Solver configurations
  sol1 "解 1" (study std1)
    v1: Variables "因变量 1"
    t1: Time "瞬态求解器 1" | tlist = range(0,dt,10*tt); initialstepbdf = 1e-15; maxstepconstraintbdf = const; maxstepbdf = dt
      dDef: Direct "直接"
      se1: Segregated "分离 1"
        ssDef: SegregatedStep "分离步骤" | segvar = {comp1_V}
        ss1: SegregatedStep "分离步骤 1" | segvar = {comp1_d}
        ss2: SegregatedStep "分离步骤 2" | segvar = {comp1_state1}
  sol2 "Solution 2" (study std2)
    v1: Variables "Dependent Variables 1"
    s1: Stationary "Stationary Solver 1"
      dDef: Direct
      fc1: FullyCoupled | linsolver = dDef
  sol3 "Solution 3" (study std3)
    v1: Variables "Dependent Variables 1"
    t1: Time "Time-Dependent Solver 1"
      tlist = range(0,dt,10*tt)
      initialstepbdf = 1e-15
      maxstepconstraintbdf = const
      maxstepbdf = dt
      d1: Direct "Direct (merged)"
      se1: Segregated
        ssDef: SegregatedStep | segvar = {comp1_V}
        ss1: SegregatedStep | segvar = {comp1_d}
        ss2: SegregatedStep | segvar = {comp1_state1, comp1_state2}

Datasets
  dset1: Solution | solution = sol1
  dset2: Solution | solution = sol2
  dset3: Solution | solution = sol3

Derived values
  av1: AvSurface "表面平均值 1" on all domains | data = dset1; table = tbl1; expr = es.normE; unit = kV/mm; descr = 电场模

Tables
  tbl1: Table "表格 1"
    // 表面平均值 1
    Time (s) | 电场模 (kV/mm)
    0 | 0
    5e-10 | 3.06755
    1e-09 | 6.12833
    1.5e-09 | 9.19069
    2e-09 | 12.305
    2.5e-09 | 15.5957
    3e-09 | 19.0565
    3.5e-09 | 22.6453
    4e-09 | 26.359
    4.5e-09 | 30.1839
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
Methods
  method1: CodeEditor
    public class method1 extends ApplicationMethod {
      public void execute() {
        //define a declaration named "file1" first !!!
        importFile("file1");
        String file_name = getFilePath("upload:///file1");
        String[][] D = null;
        if (file_name.endsWith(".xls") || file_name.endsWith(".xlsx"))
          D = readExcelFile("upload:///file1");
        else if (file_name.endsWith("csv"))
          D = readCSVFile("upload:///file1");
        else
          error("Unknown file type.");
        model.geom("geom1").feature().clear();
        for (int k = 0; k < D.length; k++) {
          model.component("comp1").geom("geom1").create("c"+k, "Circle");
          model.component("comp1").geom("geom1").feature("c"+k).set("r", D[k][3]);
          model.component("comp1").geom("geom1").feature("c"+k).set("pos", new String[]{D[k][9], D[k][11]});
          //model.component("comp1").geom("geom1").feature("c"+k).set("contributeto", "csel1");
          //model.geom("geom1").feature("sph"+k).set("selresult", "on");
          // model.variable().remove("var"+k);
          //model.variable().create("var"+k).model("comp1");
          //model.variable("var"+k).selection().named("geom1_P"+k+"_dom");
          //model.variable("var"+k).set("Q", D[k][1]);
        }
        model.geom("geom1").run();
        zoomExtents("/form1/graphics1");
      }
    }