// COMSOL Multiphysics 6.2.0.290 model "nanocomposite_dielectric_prediction.mph"
// Outline of the model tree

Parameters
  n_f = 1  // number of fillers
  V_f = 4/3*pi*r_f^3*n_f  // total volume of fillers
  VFGG = 0.1  // volume fraction of the fillers
  V_c = V_f/VF  // volume of composites
  e_fMgO = 9.6  // relative permittivity of filler (MgO)
  e_i = 1  // relative permittivity of interface
  k = 20
  n = 10
  rho_r = 1170[g/cm^3]  // density of resin
  VF_convert = (WF * rho_r) / ((WF * rho_r) + ((1 - WF) * rho_f))
  VFmax = pi*n_f*r_f^3/(6*(r_f+thk)^3)
  VF = VF_convert
  WF_convert = (VF *rho_f) / ((VF * rho_f) + ((1 - VF) * rho_r))
  e_fAlN = 8.9  // relative permittivity of filler (AlN)
  e_fAlO = 10
  e_fTiO = 99
  l_c = V_c^(1/3)  // length of the unit cell
  PESU = 4.386
  EP = 3.52
  rho_AlO = 4000[g/cm^3]
  rho_AlN = 3260[g/cm^3]
  rho_BN = 2100[g/cm^3]
  rho_TiO2 = 4000[g/cm^3]
  rho_MgO = 4000[g/cm^3]
  rho_BT = 6020[g/cm^3]
  e_fBT = 1700
  e_fSiO2 = 7
  rho_SiO2 = 2600[g/cm^3]
  thkmax = (pi*r_f^3*n_f/6/VF)^(1/3)-r_f
  r_f = 30[nm]  // radius of filler
  thk = 10[nm]  // thickness of interface
  np = 5
  e_r = EP  // relative permittivity of resin
  e_f = e_fAlN
  WF = 0.05  // weight fraction
  rho_f = rho_AlN  // density of filler

Variables
  var1 "exponent"
    norDw = (wd.Dw-minop1(wd.Dw))/(maxop1(wd.Dw)-minop1(wd.Dw))
    pff = ((0.5-norDw)/0.5)^n
    pgg = ((norDw-0.5)/0.5)^n
    ff = (1-exp(-k*pff))/(1-exp(-k))
    gg = (1-exp(-k*pgg))/(1-exp(-k))
    e_int = (norDw<0.5)*((e_f-e_i)*ff+e_i)+(norDw>=0.5)*((e_r-e_i)*gg+e_i)
  var2 "power function"
    e_int2 = (norDw<0.5)*((e_f-e_i)*ffp+e_i)+(norDw>=0.5)*((e_r-e_i)*ggp+e_i)
    ffp = (1-2*norDw)^np
    ggp = (2*norDw-1)^np

Selections
  sel2: Explicit "ALL" on domains 1-10
  sel1: Explicit "Resin" on domains 1
  ball1: Ball "filler" | entitydim = 3
  dif1: Difference "interface" | entitydim = 3; add = {sel2}; subtract = {sel1, ball1}
  sel3: Explicit "wall of filler" on boundaries 14-17, 23, 24, 28, 31
  sel4: Explicit "plot" on boundaries 6-10, 12-33

Couplings
  maxop1: Maximum on selection dif1
  minop1: Minimum on selection dif1

Geometry
  geom1 "Geometry 1" (3D, length unit nm)
    sph1: Sphere | layername = Layer 1; layer = thk; r = r_f+thk
    blk1: Block | base = center; size = {l_c, l_c, l_c}
    fin: Finalize "Form Union"

Materials
  mat1: Common "resin" on selection sel1
    def "Basic"
      relpermittivity = e_r
  mat2: Common "filler" on selection ball1
    def "Basic"
      relpermittivity = e_f
  mat3: Common "interface" on selection dif1
    def "Basic"
      relpermittivity = e_int2

Physics
  wd: WallDistance on selection dif1
    dependent variable G
    PhysicalModelProperty.sigmaw = 0.1
    deq1: DistanceEquation (default)
    init1: init "Initial Values 1" (default)
    wall1: Wall on selection sel3
  es: Electrostatics on all domains
    dependent variable V
    ShapeProperty.order_electricpotential = 2
    ccn1: ChargeConservation (default)
    zc1: ZeroCharge (default)
    init1: init "Initial Values 1" (default)
    gnd1: Ground on boundaries 3
    term1: Terminal on boundaries 4 | TerminalType = Voltage; V0 = 10

Mesh
  mesh1 "Mesh 1"
    size: MeshSizeDefault | hmax = 18.3; hmin = 3.29; hcurve = 0.6; hnarrow = 0.5; hgrad = 1.5
    swe1: Sweep "Swept 1" on selection dif1
      size1: Size on selection dif1 | hmax = thk/10; hmin = thk/20; hauto = 4; custom = on
      dis1: Distribution (disabled) on domains 2-5, 7-10 | numelem = thk
    ftet1: FreeTet "Free Tetrahedral 1" on remaining entities
      size1: Size on entire geometry | hauto = 4

Studies
  std1 "MgO 2%"
    stat: Stationary | solve for = {wd}
    stat2: Stationary | solve for = {es}; notsolmethod = sol; notstudy = std1; notsol = current

Solver configurations
  sol1 "Solution 1" (study std1)
    v1: Variables "Dependent Variables 1"
    s1: Stationary "Stationary Solver 1"
      dDef: Direct
      fc1: FullyCoupled | linsolver = dDef
    su1: StoreSolution "Solution Store 1"
    v2: Variables "Dependent Variables 2" | initmethod = sol; notsolmethod = sol
    s2: Stationary "Stationary Solver 2"
      fc1: FullyCoupled | linsolver = i1
      i1: Iterative | linsolver = cg
        mg1: Multigrid | prefun = amg; coarseningmethod = classic
  sol2 "Solution Store 1" (study std1)

Datasets
  dset1: Solution | solution = sol1
  dset2: Solution | solution = sol2
  cpl1: CutPlane | data = dset1
  cpl2: CutPlane on selection dif1 | data = dset1

Tables
  tbl1: Table
    // Volume Average 1
    Relative permittivity, isotropic value (1) | Relative permittivity, isotropic value (1) | Relative permittivity, isotropic value (1) | Relative permittivity, isotropic value (1) | Relative permittivity, isotropic value (1) | Relative permittivity, isotropic value (1) | Relative permittivity, isotropic value (1) | Relative permittivity, isotropic value (1) | Relative permittivity, isotropic value (1) | Relative permittivity, isotropic value (1) | Relative permittivity, isotropic value (1) | Relative permittivity, isotropic value (1)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
    3.41355 | 3.29669 | 3.20145 | 3.27946 | 3.17949 | 3.09961 | 3.31447 | 3.36846 | 3.44433 | 3.49155 | 3.23243 | 3.49081
  tbl2: Table
    // Volume Average 1
    Relative permittivity, isotropic value (1) | Relative permittivity, isotropic value (1) | Relative permittivity, isotropic value (1) | Relative permittivity, isotropic value (1) | Relative permittivity, isotropic value (1) | Relative permittivity, isotropic value (1) | Relative permittivity, isotropic value (1) | Relative permittivity, isotropic value (1) | Relative permittivity, isotropic value (1) | Relative permittivity, isotropic value (1) | Relative permittivity, isotropic value (1) | Relative permittivity, isotropic value (1)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
    3.16281 | 4.33442 | 3.24574 | 3.23891 | 3.17798 | 3.08497 | 3.31447 | 3.30265 | 3.49939 | 3.39313 | 3.53099 | 3.53087
  tbl3: Table
    // Volume Average 1
    Relative permittivity, isotropic value (1) | Relative permittivity, isotropic value (1) | Relative permittivity, isotropic value (1) | Relative permittivity, isotropic value (1) | Relative permittivity, isotropic value (1) | Relative permittivity, isotropic value (1) | Relative permittivity, isotropic value (1) | Relative permittivity, isotropic value (1)
    2.80837 | 3.54087 | 3.59079 | 3.70826 | 3.53859 | 3.58284 | 4.45691 | 3.48096
  tbl4: Table
    // Volume Average 1
    Relative permittivity, isotropic value (1) | Relative permittivity, isotropic value (1) | Relative permittivity, isotropic value (1) | Relative permittivity, isotropic value (1) | Relative permittivity, isotropic value (1) | Relative permittivity, isotropic value (1) | Relative permittivity, isotropic value (1) | Relative permittivity, isotropic value (1) | Relative permittivity, isotropic value (1) | Relative permittivity, isotropic value (1) | Relative permittivity, isotropic value (1) | Relative permittivity, isotropic value (1)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
    3.06078 | 3.06078 | 3.27792 | 3.27792 | 3.32358 | 3.47204 | 3.54397 | 3.54397 | 3.64376 | 3.30245 | 3.30245 | 3.43223

Plots
  pg6: PlotGroup2D "2D section of interface" | data = cpl2
    surf1: Surface | expr = es.epsilonr_iso
      sel1: Selection